!!!!!!!!!!!!!!!!!!!!!!!!!!!!!!!!!!!!!!!!!!!!!!!!
!! Post1 Loop Thermal
!!!!!!!!!!!!!!!!!!!!!!!!!!!!!!!!!!!!!!!!!!!!!!!!


finish
/post1
file,field2,rst
cmsel,s,tcond
set,last,
*get,nset,active,0,set,NSET
plnsol,b,y
plnsol,b,sum
csys,0

/DELETE,Therm_v_t,txt
*cfopen,Therm_v_t,txt

set,first
*do,i,1,nset
  /input,002_sum_101_therm,txt
  *get,tm,active,0,set,time
	*vwrite,tm,Tsave,Bsave,CvCuave,CvNb3Snave,CvG10ave,Cvmixave
(10(ES16.7))
	set,next
*enddo

*cfclose
